*HEADING
Abaqus export from ScanIP+FE
Units: Millimetres (mm)
**==============================================================================
**MATERIAL DEFINITIONS BEGIN
**==============================================================================
**==============================================================================
**MATERIAL DEFINITION BEGIN
**Part: Femur [GS=333]
**Grayscale Part Material: FEMUR_GS (0)
*SOLID SECTION, ELSET=PTGS0_FEMUR, MATERIAL=PMGS0_FEMUR_GS
*MATERIAL, NAME=PMGS0_FEMUR_GS
*ELASTIC, TYPE=ISOTROPIC
2693.89, 0.3
*DENSITY
0.454224,
**MATERIAL DEFINITION END
**==============================================================================
**==============================================================================
**MATERIAL DEFINITION BEGIN
**Part: Femur [GS=666]
**Grayscale Part Material: FEMUR_GS (1)
*SOLID SECTION, ELSET=PTGS1_FEMUR, MATERIAL=PMGS1_FEMUR_GS
*MATERIAL, NAME=PMGS1_FEMUR_GS
*ELASTIC, TYPE=ISOTROPIC
7401.68, 0.3
*DENSITY
0.789104,
**MATERIAL DEFINITION END
**==============================================================================
**==============================================================================
**MATERIAL DEFINITION BEGIN
**Part: Femur [GS=999]
**Grayscale Part Material: FEMUR_GS (2)
*SOLID SECTION, ELSET=PTGS2_FEMUR, MATERIAL=PMGS2_FEMUR_GS
*MATERIAL, NAME=PMGS2_FEMUR_GS
*ELASTIC, TYPE=ISOTROPIC
14140.5, 0.3
*DENSITY
1.12398,
**MATERIAL DEFINITION END
**==============================================================================
**==============================================================================
**MATERIAL DEFINITION BEGIN
**Part: Femur [GS=1484]
**Grayscale Part Material: FEMUR_GS (3)
*SOLID SECTION, ELSET=PTGS3_FEMUR, MATERIAL=PMGS3_FEMUR_GS
*MATERIAL, NAME=PMGS3_FEMUR_GS
*ELASTIC, TYPE=ISOTROPIC
17000, 0.46
*DENSITY
1.12398,
**MATERIAL DEFINITION END
**==============================================================================
**==============================================================================
**MATERIAL DEFINITION BEGIN
**Part: COMBINED (FROM SURFACE)_HMG
**Part Material: COMBINED (FROM SURFACE)_HMG
*SOLID SECTION, ELSET=PT_COMBINED_FROM_SURFACE, MATERIAL=PM_COMBINED_FROM_SURFACE_HMG
*MATERIAL, NAME=PM_COMBINED_FROM_SURFACE_HMG
*ELASTIC, TYPE=ISOTROPIC
105000, 0.342
*DENSITY
4.52e-09,
**MATERIAL DEFINITION END
**==============================================================================
**==============================================================================
**MATERIAL DEFINITIONS END
**==============================================================================
**==============================================================================
**CONTACT DEFINITIONS BEGIN
**==============================================================================
**==============================================================================
**CONTACT DEFINITION BEGIN
**Contact: Femur with Combined (from surface)
*CONTACT PAIR, INTERACTION=CT_FEMUR_WITH_COMBINED_FROM_SURFACE, SMALL SLIDING
SF_COMBINED_FROM_SURFACE_WITH_FEMUR, SF_FEMUR_WITH_COMBINED_FROM_SURFACE
*SURFACE INTERACTION, NAME=CT_FEMUR_WITH_COMBINED_FROM_SURFACE
*FRICTION
0.1,
**CONTACT DEFINITION END
**==============================================================================
**==============================================================================
**CONTACT DEFINITIONS END
**==============================================================================
**==============================================================================
**NODE DATA BEGIN
**==============================================================================
*NODE
1, 1.060841369629e+02, -1.330779190063e+02, -2.486544189453e+02
2, 1.108419685364e+02, -1.364243621826e+02, -2.482243194580e+02
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**==============================================================================
**NODE DATA END
**==============================================================================
**==============================================================================
**SOLID ELEMENT DATA BEGIN
**==============================================================================
**==============================================================================
**ELEMENTS - Part: Femur BEGIN
**Part Material: FEMUR_GS
**Material ID: PM_FEMUR_GS
**Material Index: 1
**==============================================================================
**ELEMENTS - Part: Femur [GS=333] BEGIN
**Grayscale Part Material: FEMUR_GS (0)
**Material ID: PMGS0_FEMUR_GS
**Material Index: 2
**==============================================================================
**ELEMENTS (TETRAHEDRA) - Part: Femur [GS=333] BEGIN
*ELEMENT, TYPE=C3D4, ELSET=PTGS0_FEMUR
4,13,14,15,16
13,31,49,50,7
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**ELEMENTS (TETRAHEDRA) - Part: Femur [GS=333] END
**==============================================================================
**ELEMENTS - Part: Femur [GS=333] END
**==============================================================================
**==============================================================================
**ELEMENTS - Part: Femur [GS=666] BEGIN
**Grayscale Part Material: FEMUR_GS (1)
**Material ID: PMGS1_FEMUR_GS
**Material Index: 3
**==============================================================================
**ELEMENTS (TETRAHEDRA) - Part: Femur [GS=666] BEGIN
*ELEMENT, TYPE=C3D4, ELSET=PTGS1_FEMUR
6,21,22,23,24
7,25,26,27,28
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**ELEMENTS (TETRAHEDRA) - Part: Femur [GS=666] END
**==============================================================================
**ELEMENTS - Part: Femur [GS=666] END
**==============================================================================
**==============================================================================
**ELEMENTS - Part: Femur [GS=999] BEGIN
**Grayscale Part Material: FEMUR_GS (2)
**Material ID: PMGS2_FEMUR_GS
**Material Index: 4
**==============================================================================
**ELEMENTS (TETRAHEDRA) - Part: Femur [GS=999] BEGIN
*ELEMENT, TYPE=C3D4, ELSET=PTGS2_FEMUR
1,1,2,3,4
2,5,6,7,8
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**ELEMENTS (TETRAHEDRA) - Part: Femur [GS=999] END
**==============================================================================
**ELEMENTS - Part: Femur [GS=999] END
**==============================================================================
**==============================================================================
**ELEMENTS - Part: Femur [GS=1484] BEGIN
**Grayscale Part Material: FEMUR_GS (3)
**Material ID: PMGS3_FEMUR_GS
**Material Index: 5
**==============================================================================
**ELEMENTS (TETRAHEDRA) - Part: Femur [GS=1484] BEGIN
*ELEMENT, TYPE=C3D4, ELSET=PTGS3_FEMUR
3,9,10,11,12
5,17,18,19,20
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**ELEMENTS (TETRAHEDRA) - Part: Femur [GS=1484] END
**==============================================================================
**ELEMENTS - Part: Femur [GS=1484] END
**==============================================================================
**ELEMENTS - Part: Femur END
**==============================================================================
**==============================================================================
**DEFINITION OF GRAYSCALE-EXPORTED PART BEGIN
**Part: Femur
*ELSET, ELSET=PT_FEMUR
PTGS0_FEMUR,PTGS1_FEMUR,PTGS2_FEMUR,PTGS3_FEMUR,
**Part: Femur
**DEFINITION OF GRAYSCALE-EXPORTED PART END
**==============================================================================
**==============================================================================
**ELEMENTS - Part: Combined (from surface) BEGIN
**Part Material: COMBINED (FROM SURFACE)_HMG
**Material ID: PM_COMBINED_FROM_SURFACE_HMG
**Material Index: 6
**==============================================================================
**ELEMENTS (TETRAHEDRA) - Part: Combined (from surface) BEGIN
*ELEMENT, TYPE=C3D4, ELSET=PT_COMBINED_FROM_SURFACE
14473,4093,4094,4095,4096
14474,4097,4098,4099,4100
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**ELEMENTS (TETRAHEDRA) - Part: Combined (from surface) END
**==============================================================================
**ELEMENTS - Part: Combined (from surface) END
**==============================================================================
**==============================================================================
**SOLID ELEMENT DATA END
**==============================================================================
**==============================================================================
**SHELL ELEMENT DATA BEGIN
**==============================================================================
**==============================================================================
**SHELL ELEMENT DATA END
**==============================================================================
**==============================================================================
**CONTACT SURFACE DATA BEGIN
**==============================================================================
**==============================================================================
**CONTACT SURFACE BEGIN
**==============================================================================
**CONTACT SURFACE ELEMENTS BEGIN
**Contact: Femur with Combined (from surface)
*SURFACE, NAME=SF_FEMUR_WITH_COMBINED_FROM_SURFACE, TYPE=ELEMENT
20, S2
25, S2
38, S4
40, S4
41, S2
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14462, S2
**CONTACT SURFACE ELEMENTS END
**==============================================================================
**CONTACT SURFACE END
**==============================================================================
**==============================================================================
**CONTACT SURFACE BEGIN
**==============================================================================
**CONTACT SURFACE ELEMENTS BEGIN
**Contact: Combined (from surface) with Femur
*SURFACE, NAME=SF_COMBINED_FROM_SURFACE_WITH_FEMUR, TYPE=ELEMENT
14481, S3
14484, S4
14489, S3
14512, S4
14518, S3
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21730, S4
**CONTACT SURFACE ELEMENTS END
**==============================================================================
**CONTACT SURFACE END
**==============================================================================
**==============================================================================
**CONTACT SURFACE DATA END
**==============================================================================
